// COMSOL Multiphysics 6.1.0.357 model "kabel forlagt i jord i case 0 thermal test.mph"
// Outline of the model tree

Parameters
  Dcon = 30.3[mm]  // Diameter of main conductors (phase)
  Tins = 15.5[mm]  // Insulation thickness (XLPE)
  Dins = 64.3[mm]  // Diameter over insulation (XLPE and SCC)
  Tscc_inner = 1.5[mm]  // Semi-conductive compound thickness
  Tpe = 3.5[mm]  // Polyethylene sheath thickness
  Douter = 75.5[mm]  // Outer diameter of cable
  Tscreen = 0.8[mm]
  A_actual_cond = 240 [mm^2]  // The cross-section provided in the datasheet
  A_model = pi*(Dcon/2)^2
  R_DC_datasheet = 0.125[ohm/km]
  resistivity_scaled = R_DC_datasheet*A_model
  conductivity_scaled = 1/resistivity_scaled
  Tscc_outer = 1.3[mm]
  D_Al_sheath_outer = 68.5[mm]
  f0 = 50[Hz]  // Operating frequency
  w0 = (2*pi*f0[1/Hz])[rad/s]  // Angular frequency
  V0 = 132[kV]/sqrt(3)*sqrt(2)  // Phase to ground voltage (amplitude)
  I0 = 803.16*sqrt(2)  // Rated current (amplitude)
  Scup = 56088395.31101015*Ncon [S/m]  // Copper conductivity, at 20°C
  Sarm = 3.5e7[S/m]  // Armor wire conductivity, at 20°C
  Mcup = 1  // Relative permeability, copper
  Mpbs = 1  // Relative permeability, lead sheath
  Marm = 100-50*j  // Relative permeability, armor wires
  Dscup = min(1/real(sqrt(j*w0*mu0_const*Mcup*Scup)),Dcon/3)  // Skin depth, copper (analytic)
  Exlpe = 2.5  // Relative permittivity XLPE (from IEC 60287)
  Acon = 630[mm^2]  // Cross sectional area of main conductors (per phase)
  Ncon = Acon/(pi*(Dcon/2)^2)  // Conductor packing density (phase)
  Lsec1 = 1/3  // Relative length cross bonding section 1
  Lsec2 = 1-Lsec1-Lsec3  // Relative length cross bonding section 2
  Lsec3 = 1/3  // Relative length cross bonding section 3
  Lcab = 1[m]  // Total length of submarine cable
  Scab = 1e5  // Geometric scale factor (2Daxi model)
  Ntcon = 0.075281  // Main conductor thermal packing density (phase)
  Tmcon = 89.4[degC]  // Average temperature of main conductors (phase)
  Tmpbs = 82.7[degC]  // Average screen temperature (lead sheath)
  Tmarm = 70.1[degC]  // Average temperature of armor ring
  Tmext = 20[degC]  // External temperature (sea bed)
  Tmref = 20[degC]  // Linearized resistivity reference temperature
  R0cup2 = 2.83*10^(-5)*630E-6 [ohm*m]
  R0cup = 2.83 * 10^(-5)*pi*(Dcon/2)^2 [ohm*m]  // Reference resistivity, copper, at 20°C
  R0alSheath = 2.84E-8 [ohm/m]  // Reference resistivity, al sheath, at 20°C
  ALcup = 3.93e-3[1/K]  // Resistivity temperature coefficient, copper
  W_d = 0.3851382171607165[W/m]  // Dielectric losses per meter from analytical solution
  A_XLPE = pi*((D_outer_XLPE/2)^2 - (D_inner_XLPE/2)^2)
  W_d_pm = W_d / A_XLPE
  D_inner_XLPE = Dcon+2*Tscc_inner
  D_outer_XLPE = Dins
  ALalSheath = 4.03e-3[1/K]  // Resistivity temperature coefficient, armor wires
  Sal = (1/R0alSheath)

Selections
  adj1: Adjacent "Thermal contact" | entitydim = 1; outputdim = 1

Geometry
  geom1 "Geometry 1" (2D, length unit mm)
    c1: Circle "Phase 1" | pos = {Douter/2, -Douter/(2*sqrt(3))}; rot = -30; r = Dcon/2
    c2: Circle "Phase 2" | pos = {-Douter/2, -Douter/(2*sqrt(3))}; rot = -150; r = Dcon/2
    c3: Circle "Phase 3" | pos = {0, Douter/(sqrt(3))}; rot = 90; r = Dcon/2
    uni7: Union "Phases" | input = c1, c2, c3
    c4: Circle "InnerScc"
      pos = {Douter/2, -Douter/(2*sqrt(3))}
      rot = -30
      type = curve
      layername = Layer 1
      layer = Tscc_inner
      r = Dcon/2+Tscc_inner
    c5: Circle "Ins"
      pos = {Douter/2, -Douter/(2*sqrt(3))}
      rot = -30
      type = curve
      layername = Layer 1
      layer = Tins
      r = Dins/2
    c6: Circle "OuterScc"
      pos = {Douter/2, -Douter/(2*sqrt(3))}
      rot = -30
      type = curve
      layername = Layer 1
      layer = Tscc_outer
      r = Dins/2+Tscc_outer
    c7: Circle "PE jacket"
      pos = {Douter/2, -Douter/(2*sqrt(3))}
      rot = -30
      type = curve
      layername = Layer 1
      layer = Tpe
      r = Douter/2
    uni5: Union "Outer PE jacket" | input = c7; intbnd = off; edge = all
    c8: Circle "AlScreen"
      pos = {Douter/2, -Douter/(2*sqrt(3))}
      rot = -30
      type = curve
      layername = Layer 1
      layer = Tscreen
      r = D_Al_sheath_outer/2
    uni4: Union "AlScreenGroup" | input = c8(1); intbnd = off; edge = all
    uni1: Union "Semiconductive compound" | input = c4, c6; intbnd = off; edge = all
    uni2: Union "Cross-linked polyethylene (XLPE)" | input = c5; intbnd = off; edge = all
    rot2: Rotate | input = uni5(1), uni4(1), uni1(1), uni2(1); rot = 0, 120, -120
    uni8: Union "Metals" | input = rot2(4), rot2(5), rot2(6), uni7
    c9: Circle "Electromagnetic domains" | r = 7.5*Douter
    r1: Rectangle "Thermal domains" | pos = {-25[m], -20[m]}; layername = Layer 1; layer = 21[m]; size = {50[m], 40[m]}
    fin: Finalize "Form Union"

Materials
  mat1: Common "Air" on all domains
    def "Basic"
      thermalexpansioncoefficient = alpha_p(pA,T)
      molarmass = 0.02897[kg/mol]
      bulkviscosity = muB(T)
      relpermeability = 1
      relpermittivity = 1
      dynamicviscosity = eta(T)
      ratioofspecificheat = 1.4
      electricconductivity = 0[S/m]
      heatcapacity = Cp(T)
      density = rho(pA,T)
      thermalconductivity = k(T)
      soundspeed = cs(T)
      eta: Piecewise | arg = T; pieces = {200.0, 1600.0, -8.38278E-7+8.35717342E-8*T^1-7.69429583E-11*T^2+4.6437266E-14*T^3-1.06585607E-17*T^4}; argunit = K; fununit = Pa*s
      Cp: Piecewise | arg = T; pieces = {200.0, 1600.0, 1047.63657-0.372589265*T^1+9.45304214E-4*T^2-6.02409443E-7*T^3+1.2858961E-10*T^4}; argunit = K; fununit = J/(kg*K)
      rho: Analytic | expr = pA*0.02897/R_const[K*mol/J]/T; args = {pA, T}; fununit = kg/m^3; argunit = {Pa, K}
      k: Piecewise | arg = T; pieces = {200.0, 1600.0, -0.00227583562+1.15480022E-4*T^1-7.90252856E-8*T^2+4.11702505E-11*T^3-7.43864331E-15*T^4}; argunit = K; fununit = W/(m*K)
      cs: Analytic | expr = sqrt(1.4*R_const[K*mol/J]/0.02897*T); args = T; fununit = m/s; argunit = K
      an1: Analytic | funcname = alpha_p; expr = -1/rho(pA,T)*d(rho(pA,T),T); args = {pA, T}; fununit = 1/K; argunit = {Pa, K}
      an2: Analytic "Analytic 2a" | funcname = muB; expr = 0.6*eta(T); args = T; fununit = Pa*s; argunit = K
    RefractiveIndex
      n = 1
      ki = 0
    NonlinearModel
      BA = (def.gamma+1)/2
    idealGas
      Rs = R_const/Mn
      heatcapacity = Cp(T)
      ratioofspecificheat = 1.4
      molarmass = 0.02897
      Cp: Piecewise | arg = T; pieces = {200.0, 1600.0, 1047.63657-0.372589265*T^1+9.45304214E-4*T^2-6.02409443E-7*T^3+1.2858961E-10*T^4}; argunit = K; fununit = J/(kg*K)
  mat2: Common "Soil" on domains 1, 3, 14
    def "Basic"
      relpermeability = 1
      electricconductivity = 1e-18
      relpermittivity = 2
      thermalconductivity = 1
      density = 1500
      heatcapacity = 1480
  mat3: Common "Polyethylene" on domains 4, 10, 17
    def "Basic"
      relpermeability = 1
      electricconductivity = 1e-18
      relpermittivity = 2.3
      thermalconductivity = 1/3.5
      density = 960
      heatcapacity = 2174
  mat4: Common "XLPE" on selection geom1_uni2_dom
    def "Basic"
      relpermeability = 1
      electricconductivity = 1e-18
      relpermittivity = Exlpe
      thermalconductivity = 1/(3.5[W/(m*K)])
      density = 960
      heatcapacity = 2174
  mat5: Common "Semi conductive compound" on selection geom1_uni1_dom
    def "Basic"
      relpermeability = 1
      electricconductivity = 0.1
      relpermittivity = 2.3
      thermalconductivity = 1/2.5
      density = 960
      heatcapacity = 2174
  mat6: Common "Copper" on selection geom1_uni7_dom
    def "Basic"
      relpermeability = Mcup
      electricconductivity = Ncon*Scup
      relpermittivity = 1
      thermalconductivity = Ntcon*400[W/(m*K)]
      density = 8960
      heatcapacity = 384.603
    linzRes "Linearized resistivity"
      rho0 = R0cup
      alpha = ALcup
      Tref = Tmref
  mat7: Common "Aluminium" on selection geom1_uni4_dom
    def "Basic"
      relpermeability = 1.000022
      electricconductivity = Sal
      relpermittivity = 1
      thermalconductivity = 237
      density = 2700
      heatcapacity = 890
    linzRes "Linearized resistivity"
      rho0 = R0alSheath
      alpha = ALalSheath
      Tref = Tmref
  mat8: Common "Thermal contact layer" (disabled) on boundaries 10-15, 18-20, 28-33, 39-43, 48, 50-54, 62, 63, 65-69, 72-76, 87-89
    // same settings as mat1

Physics
  mf: InductionCurrents "Magnetic Fields" on domains 3-22
    dependent variable A = {Ax, Ay, Az}
    d.d = 1
    al1: AmperesLaw "Ampère's Law 1" (default)
    mi1: MagneticInsulation (default)
    init1: init "Initial Values 1" (default)
    al2: AmperesLaw "Ampère's Law 2" on selection geom1_c9_dom
    coil1: Coil "Phase 1" on selection geom1_c1_dom
      ICoil = I0
      ConstitutiveRelationJcE = LinearizedResistivity
      materialType = from_mat
    coil2: Coil "Phase 2" on selection geom1_c2_dom
      ICoil = I0*exp(-120[deg]*j)
      ConstitutiveRelationJcE = LinearizedResistivity
      materialType = from_mat
    coil3: Coil "Phase 3" on selection geom1_c3_dom
      ICoil = I0*exp(+120[deg]*j)
      ConstitutiveRelationJcE = LinearizedResistivity
      materialType = from_mat
    al3: AmperesLaw "Ampère's Law 3" on selection geom1_uni4_dom
      ConstitutiveRelationJcE = LinearizedResistivity
      materialType = from_mat
      ConstitutiveRelationBH = RelativePermeability
    coil4: Coil (disabled) on selection geom1_uni4_dom
      ConductorModel = Single
      CoilExcitation = Voltage
      coilGroup = 0
      VCoil = 0[V]
      ConstitutiveRelationJcE = LinearizedResistivity
      materialType = from_mat
    pcond1: PassiveConductor on selection geom1_uni4_dom
      ConstrainForInducedCurrents = WithinAllDomains
      sigma_mat = userdef
      sigma = 1/(R0alSheath*(1+ALalSheath*(T-Tmext)))
  ht: HeatTransfer "Heat Transfer in Solids" on domains 1, 3-22
    dependent variable T
    PhysicalModelProperty.IsothermalDomain = 0
    solid1: SolidHeatTransferModel "Solid 1" (default)
    init1: init "Initial Values 1" (default)
    ins1: ThermalInsulation (default)
    sls1: SolidLayeredShell "Thin Layer 1" (disabled) on boundaries 10, 11, 18, 28, 29, 41-43, 48, 50-52, 63, 65, 72-74, 89
      lth_mat = userdef
      lth = 20[um]
      iv1: initres "Initial Values 1" (default)
      ins1: ThermalInsulation (default)
    temp1: TemperatureBoundary "Temperature 1" on boundaries 1-7 | T0 = Tmext
    hs1: HeatSource on domains 7, 13, 20 | heatSourceType = HeatRate; P0 = W_d * 1[m]; Q0 = W_d_pm
  ec: ConductiveMedia "Electric Currents" (disabled) on selection geom1_c9_dom
    dependent variable V
    cucn1: CurrentConservation (default)
    ein1: ElectricInsulation (default)
    init1: init "Initial Values 1" (default)
    gnd1: Ground on boundaries 12-15, 19, 20, 30-33, 39, 40, 53, 54, 61, 62, 66-69, 75, 76, 87, 88
    cucn2: CurrentConservation on selection geom1_uni8_dom
    term1: DomainTerminal "Phase 1" on domains 22 | TerminalType = Voltage; V0 = V0
    term2: DomainTerminal "Phase 2" on domains 9 | TerminalType = Voltage; V0 = V0*exp(-120[deg]*j)
    term3: DomainTerminal "Phase 3" on domains 16 | TerminalType = Voltage; V0 = V0*exp(+120[deg]*j)

Multiphysics
  emh1: ElectromagneticHeating on selection geom1_c9_dom | EMHeat_physics = mf; Heat_physics = ht

Mesh
  mesh1 "Mesh 1"
    size: MeshSizeDefault | hmin = 1; hauto = 1
    fq1: FreeQuad on domains 4-13, 15-22
      size1: Size on domains 4-13, 15-22 | hauto = 1
      dis1: Distribution on boundaries 10-48, 50-63, 65-89 | numelem = 16
    ftri1: FreeTri "Free Triangular 1" on remaining entities | smoothmaxiter = 4; smoothmaxdepth = 4
    bl1: BndLayer "Boundary Layers 1" on domains 3-5, 9-11, 14, 16-18, 22
      blp: BndLayerProp "Boundary Layer Properties" on boundaries 10-15, 18-20, 24, 25, 27-33, 36, 39-43, 46-48, 50-54, 57, 58, 61-63, 65-69, 72-76, 80, 81, 83, 84, 87-89

Studies
  std1 "Study 1"
    fstat: FrequencyStationary | freq = f0

Solver configurations
  sol1 "Solution 1" (study std1)
    v1: Variables "Dependent Variables 1"
    s1: Stationary "Stationary Solver 1"
      fc1: FullyCoupled | linsolver = d1; initstep = 0.01; minstep = 1.0E-6; maxiter = 50
      d1: Direct "Direct, heat transfer variables (ht) (merged)" | pivotperturb = 1.0E-13

Datasets
  dset1: Solution on selection geom1_c9_dom | solution = sol1

Derived values
  int1: IntSurface "Phase losses" on domains 9
    data = dset1
    table = tbl24
    expr = mf.Qh
    descr = Phase losses (one-way ih)
  int2: IntSurface "Screen losses" on domains 5, 11, 18 | data = dset1; table = tbl23; expr = {mf.Qh/3, }; unit = {W/m, }
  int3: IntSurface "Dielectric losses analytically found" on selection geom1_uni2_dom
    data = dset1
    table = tbl21
    expr = {W_d_pm/3, }
    unit = {W/m, }
  gev1: EvalGlobal "Phase AC resistance"
    data = dset1
    table = tbl20
    expr = {(mf.RCoil_1/1[m] + mf.RCoil_2/1[m] + mf.RCoil_3/1[m])/3, 25.266[W/m]/((I0[A]/sqrt(2))^2)}
    unit = {Ω/m, Ω/m}
    descr = {, R_AC from dissapated heat per phase divided by RMS current squared}
  gev2: EvalGlobal "Phase Inductance"
    data = dset1
    table = tbl7
    expr = (mf.LCoil_1/1[m]+mf.LCoil_2/1[m]+mf.LCoil_3/1[m])/3

Tables
  tbl7: Table
    // Phase Inductance
    (mf.LCoil_1+mf.LCoil_2+mf.LCoil_3)/(3*Lsec1*Lcab) (H/m) | (mf.LCoil_1/1[m]+mf.LCoil_2/1[m]+mf.LCoil_3/1[m])/3 (H/m) | (mf.LCoil_1/1[m]+mf.LCoil_2/1[m]+mf.LCoil_3/1[m])/3 (H/m) | (mf.LCoil_1/1[m]+mf.LCoil_2/1[m]+mf.LCoil_3/1[m])/3 (H/m)
    1.08867e-06 | 3.62889e-07 | 3.53951e-07 | 3.49978e-07
  tbl11: Table
    // Phase AC resistance 1
    (mf.RCoil_1/1[m] + mf.RCoil_2/1[m] + mf.RCoil_3/1[m])/3 (Ω/m) | 10 (1)
    5.20634e-05 | 10
  tbl13: Table
    // Dielectric losses
    mf.Qh/3 (W/m) | mf.Qh/3 (W/m) | mf.Qh/3 (W/m) | mf.Qh/3 (W/m)
    -2.5408e-18 | -1.25147e-17 | -1.25147e-17 | 9.4075e-18
  tbl18: Table
    // Screen losses 1
    mf.Qh/3 (W/m) | mf.Qh/3 (W/m) | mf.Qh/3 (W/m) | mf.Qh/3 (W/m) | Dielectric losses per meter from analytical solution (W*m) | W_d_pm (W/m^3) | W_d_pm (W/m^3) | A_screen (m^6)
    -3.75331e-18 | -5.69608e-18 | -5.22932e-18 | 7.17209e-18 | 0 | 0 | 0 | 0
  tbl20: Table
    // Phase AC resistance
    (mf.RCoil_1/1[m] + mf.RCoil_2/1[m] + mf.RCoil_3/1[m])/3 (Ω/m) | R_AC from dissapated heat per phase divided by RMS current squared (Ω/m) | (mf.RCoil_1/1[m] + mf.RCoil_2/1[m] + mf.RCoil_3/1[m])/3 (Ω/m) | R_AC from dissapated heat per phase divided by RMS current squared (Ω/m) | (mf.RCoil_1/1[m] + mf.RCoil_2/1[m] + mf.RCoil_3/1[m])/3 (Ω/m) | R_AC from dissapated heat per phase divided by RMS current squared (Ω/m)
    5.24716e-05 | 3.95277e-05 | 5.21916e-05 | 3.91543e-05 | 5.21905e-05 | 3.91681e-05
  tbl21: Table
    // Dielectric losses analytically found
    W_d_pm/3 (W/m) | W_d_pm/3 (W/m) | W_d_pm/3 (W/m) | W_d_pm/3 (W/m) | W_d_pm/3 (W/m) | W_d_pm/3 (W/m)
    0.385138 | 0.385138 | 0.385138 | 0.385138 | 0.385138 | 0.385138
  tbl23: Table
    // Screen losses
    Volumetric loss density, electromagnetic (W/m) | Volumetric loss density, electromagnetic (W/m) | Volumetric loss density, electromagnetic (W/m) | Volumetric loss density, electromagnetic (W/m) | Volumetric loss density, electromagnetic (W/m) | Volumetric loss density, electromagnetic (W/m) | Volumetric loss density, electromagnetic (W/m) | mf.Qh/3 (W/m)
    8.41825 | 12.2047 | 36.6135 | 2.90659 | 9.87197 | 8.42535 | 25.2736 | 8.42453
  tbl24: Table
    // Phase losses
    Phase losses (one-way ih) (W/m) | Phase losses (one-way ih) (W/m) | Phase losses (one-way ih) (W/m)
    25.7713 | 25.2493 | 24.4634

Plots
  pg1: PlotGroup2D "Magnetic Flux Density Norm (mf)" | data = dset1
    surf1: Surface | expr = mf.normB
    str1: Streamline on boundaries 8-89 | expr = {mf.Bx, mf.By}; udist = 0.03
      col1: Color "Color Expression 1" | expr = mf.normB
      filt1: Filter | expr = !isScalingSystemDomain
    con1: Contour | expr = mf.Az; levelrounding = off
      filt1: Filter | expr = !isScalingSystemDomain
  pg2: PlotGroup2D "Temperature (ht)" on selection geom1_c9_dom | data = dset1
    surf1: Surface | expr = T; unit = degC
      hght1: Height "Height Expression 1" | heightdata = expr; expr = T-40[degC]; unit = K
    con1: Contour | expr = T; unit = degC
  pg3: PlotGroup2D "Isothermal Contours (ht)" | data = dset1
    con1: Contour | expr = T; levelrounding = off
  pg4: PlotGroup2D "Temperature (ht) 1" on selection geom1_c9_dom | data = dset1
    surf1: Surface (disabled) | expr = T; unit = degC
    con1: Contour | expr = T; unit = degC; levelrounding = off; contourlabels = on